<?xml version="1.0"?>

<flight_control name="FCS: E-Jet-Family">
    <channel name="Pitch">
        <fcs_function name="Elevator Unpowered">
            <function>
                <table>
                    <independentVar lookup="row">aero/qbar-psf</independentVar>
                    <tableData>
                         0 1
                         1 1
                        15 0.5
                        50 0.1
                    </tableData>
                </table>
            </function>
            <output>fcs/elevator-unpowered</output>
        </fcs_function>

        <switch>
            <output>fcs/elevator-lh-cmd-powered</output>
            <default value="fcs/elevator-unpowered" />
            <test logic="OR" value="fcs/elevator-cmd-fbw">
                /systems/actuators/elevator/pcu[0]/active &gt; 0
                /systems/actuators/elevator/pcu[1]/active &gt; 0
            </test>
        </switch>

        <actuator name="Elevator Master">
            <input>fcs/elevator-lh-cmd-powered</input>
            <rate_limit>2</rate_limit>
            <output>fcs/elevator-lh-master</output>
        </actuator>

        <aerosurface_scale name="Elevator Control">
            <input>fcs/elevator-lh-master</input>
            <range>
                <min> -0.25 </min>
                <max>  0.25 </max>
            </range>
            <output>fcs/elevator-lh-pos-rad</output>
        </aerosurface_scale>

        <aerosurface_scale name="Elevator Normalization">
            <input>fcs/elevator-lh-pos-rad</input>
            <domain>
                <min> -0.25 </min>
                <max>  0.25 </max>
            </domain>
            <range>
                <min> -1 </min>
                <max>  1 </max>
            </range>
            <output>fcs/elevator-lh-pos-norm</output>
        </aerosurface_scale>

        <switch>
            <output>fcs/elevator-rh-cmd-powered</output>
            <default value="fcs/elevator-unpowered" />
            <test logic="OR" value="fcs/elevator-cmd-fbw">
                /systems/actuators/elevator/pcu[2]/active &gt; 0
                /systems/actuators/elevator/pcu[3]/active &gt; 0
            </test>
        </switch>

        <actuator name="Elevator Master">
            <input>fcs/elevator-rh-cmd-powered</input>
            <rate_limit>2</rate_limit>
            <output>fcs/elevator-rh-master</output>
        </actuator>

        <aerosurface_scale name="Elevator Control">
            <input>fcs/elevator-rh-master</input>
            <range>
                <min> -0.25 </min>
                <max>  0.25 </max>
            </range>
            <output>fcs/elevator-rh-pos-rad</output>
        </aerosurface_scale>

        <aerosurface_scale name="Elevator Normalization">
            <input>fcs/elevator-rh-pos-rad</input>
            <domain>
                <min> -0.25 </min>
                <max>  0.25 </max>
            </domain>
            <range>
                <min> -1 </min>
                <max>  1 </max>
            </range>
            <output>fcs/elevator-rh-pos-norm</output>
        </aerosurface_scale>


        <aerosurface_scale name="HStab Control">
            <input>fcs/pitch-trim-cmd-norm</input>
            <range>
                <min> -0.25 </min>
                <max>  0.25 </max>
            </range>
            <output>fcs/hstab-pos-rad</output>
        </aerosurface_scale>

        <aerosurface_scale name="HStab Normalization">
            <input>fcs/hstab-pos-rad</input>
            <domain>
                <min> -0.25 </min>
                <max>  0.25 </max>
            </domain>
            <range>
                <min> -1 </min>
                <max>  1 </max>
            </range>
            <output>fcs/hstab-pos-norm</output>
        </aerosurface_scale>

        <aerosurface_scale name="HStab Degrees">
            <input>fcs/hstab-pos-rad</input>
            <domain>
                <min> -0.25 </min>
                <max>  0.25 </max>
            </domain>
            <range>
                <min> -14.3239448782705 </min>
                <max>  14.3239448782705 </max>
            </range>
            <output>fcs/hstab-pos-deg</output>
        </aerosurface_scale>
    </channel>

    <channel name="Roll">
        <summer name="fcs/aileron-sum">
            <input>/it-autoflight/internal/aileron</input>
            <output>fcs/aileron-sum</output>
        </summer>


        <summer name="Roll Trim Sum">
            <input>fcs/aileron-sum</input>
            <input>fcs/roll-trim-cmd-norm</input>
            <clipto>
                <min> -1 </min>
                <max>  1 </max>
            </clipto>
        </summer>

        <fcs_function name="Aileron Unpowered">
            <function>
                <table>
                    <independentVar lookup="row">aero/qbar-psf</independentVar>
                    <tableData>
                         0 1
                         1 1
                        15 0.5
                        50 0.1
                    </tableData>
                </table>
            </function>
            <output>fcs/aileron-unpowered</output>
        </fcs_function>

        <switch>
            <output>fcs/left-aileron-cmd-powered</output>
            <default value="fcs/aileron-unpowered" />
            <test logic="OR" value="fcs/roll-trim-sum">
                /systems/actuators/aileron/pcu[0]/active &gt; 0
                /systems/actuators/aileron/pcu[1]/active &gt; 0
            </test>
        </switch>

        <actuator name="Left Aileron Master">
            <input>fcs/left-aileron-cmd-powered</input>
            <rate_limit>2</rate_limit>
            <output>fcs/left-aileron-master</output>
        </actuator>

        <switch>
            <output>fcs/right-aileron-cmd-powered</output>
            <default value="fcs/aileron-unpowered" />
            <test logic="OR" value="-fcs/roll-trim-sum">
                /systems/actuators/aileron/pcu[2]/active &gt; 0
                /systems/actuators/aileron/pcu[3]/active &gt; 0
            </test>
        </switch>

        <actuator name="Right Aileron Master">
            <input>fcs/right-aileron-cmd-powered</input>
            <rate_limit>2</rate_limit>
            <output>fcs/right-aileron-master</output>
        </actuator>


        <aerosurface_scale name="Left Aileron Control">
            <input>fcs/left-aileron-master</input>
            <range>
                <min> -0.25 </min>
                <max>  0.25 </max>
            </range>
            <output>fcs/left-aileron-pos-rad</output>
        </aerosurface_scale>

        <aerosurface_scale name="Right Aileron Control">
            <input>fcs/right-aileron-master</input>
            <range>
                <min> -0.25 </min>
                <max>  0.25 </max>
            </range>
            <output>fcs/right-aileron-pos-rad</output>
        </aerosurface_scale>

        <aerosurface_scale name="left aileron normalization">
            <input>fcs/left-aileron-pos-rad</input>
            <domain>
                <min> -0.25 </min>
                <max>  0.25 </max>
            </domain>
            <range>
                <min> -1 </min>
                <max>  1 </max>
            </range>
            <output>fcs/left-aileron-pos-norm</output>
        </aerosurface_scale>

        <aerosurface_scale name="right aileron normalization">
            <input>fcs/right-aileron-pos-rad</input>
            <domain>
                <min> -0.25 </min>
                <max>  0.25 </max>
            </domain>
            <range>
                <min> -1 </min>
                <max>  1 </max>
            </range>
            <output>fcs/right-aileron-pos-norm</output>
        </aerosurface_scale>

    </channel>

    <channel name="Yaw">
        <summer name="Rudder Command Sum">
            <input>-/controls/flight/rudder</input>
            <input>/it-autoflight/internal/rudder</input>
            <input>fcs/yaw-trim-cmd-norm</input>
            <clipto>
                <min> -0.55 </min>
                <max>  0.55 </max>
            </clipto>
        </summer>

        <scheduled_gain name="Yaw Damper Rate">
            <input>velocities/r-aero-rad_sec</input>
            <table>
                <independentVar lookup="row">velocities/ve-kts</independentVar>
                <tableData>
                    30     0.00
                    60     2.00
                </tableData>
            </table>
            <gain>fcs/yaw-damper-enable</gain>
        </scheduled_gain>

        <scheduled_gain name="Yaw Damper Beta">
            <input>aero/beta-rad</input>
            <table>
                <independentVar>aero/qbar-psf</independentVar>
                <tableData>
                    3.0000   0.0000
                    11.0000   1.0000
                </tableData>
            </table>
            <gain>aero-config/coefficients/yaw-damper-beta</gain>
        </scheduled_gain>

        <scheduled_gain name="Yaw Damper">
            <input>velocities/r-aero-rad_sec</input>
            <table>
                <independentVar>velocities/mach</independentVar>
                <tableData>
                    0.00        0.0
                    0.10        0.0
                    0.11        1.0
                </tableData>
            </table>
            <gain>aero-config/coefficients/yaw-damper-rate</gain>
        </scheduled_gain>

        <summer name="Yaw Damper Sum">
            <input>fcs/yaw-damper</input>
            <input>fcs/yaw-damper-beta</input>
        </summer>

        <scheduled_gain name="Yaw Damper Final">
            <input>fcs/yaw-damper-sum</input>
            <table>
                <independentVar>velocities/mach</independentVar>
                <tableData>
                    0.00        0.0
                    0.10        0.0
                    0.11        1.0
                </tableData>
            </table>
            <gain>fcs/yaw-damper-enable</gain>
        </scheduled_gain>

        <summer name="Rudder Sum">
            <input>fcs/rudder-command-sum</input>
            <input>fcs/yaw-damper-final</input>
            <clipto>
                <min> -1 </min>
                <max>  1 </max>
            </clipto>
        </summer>

        <switch>
            <output>fcs/rudder-rate-limit</output>
            <default value="0" />
            <test logic="OR" value="2">
                /systems/actuators/rudder/pcu[0]/active &gt; 0
                /systems/actuators/rudder/pcu[1]/active &gt; 0
            </test>
        </switch>

        <actuator>
            <input>fcs/rudder-sum</input>
            <rate_limit>fcs/rudder-rate-limit</rate_limit>
            <output>fcs/rudder-master</output>
        </actuator>

        <aerosurface_scale name="Rudder Control">
            <input>fcs/rudder-master</input>
            <range>
                <min> -0.530 </min>
                <max>  0.530 </max>
            </range>
            <output>fcs/rudder-pos-rad</output>
        </aerosurface_scale>

        <aerosurface_scale name="rudder normalization">
            <input>fcs/rudder-pos-rad</input>
            <domain>
                <min> -0.530 </min>
                <max>  0.530 </max>
            </domain>
            <range>
                <min> -1 </min>
                <max>  1 </max>
            </range>
            <output>fcs/rudder-pos-norm</output>
        </aerosurface_scale>

    </channel>

    <channel name="Slats">

        <!--Set slats according to http://www.smartcockpit.com/docs/Embraer_190-Flight_Controls.pdf page 4-->
        <fcs_function name="Slats Cmd">
            <function>
                <table>
                    <independentVar>/controls/flight/flaps</independentVar>
                    <tableData>
                        0.000   0
                        0.125  15
                        0.250  15
                        0.375  15
                        0.500  25
                        0.625  25
                        0.750  25
                    </tableData>
                </table>
            </function>
            <output>fcs/slat-cmd-int-deg</output>
        </fcs_function>

        <kinematic name="Slats Control">
            <input>fcs/slat-cmd-int-deg</input>
            <noscale/>
            <traverse>
                <setting>
                    <position>0.0</position>
                    <time>0.0000</time>
                </setting>
                <setting>
                    <position>15</position>
                    <time>2.0000</time>
                </setting>
                <setting>
                    <position>25</position>
                    <time>1.5000</time>
                </setting>
            </traverse>
            <output>fcs/slat-pos-deg</output>
        </kinematic>

        <aerosurface_scale name="slat normalization">
            <input>fcs/slat-pos-deg</input>
            <domain>
                <min>  0 </min>
                <max> 25 </max>
            </domain>
            <range>
                <min> 0 </min>
                <max> 1 </max>
            </range>
            <output>fcs/slat-pos-norm</output>
        </aerosurface_scale>

    </channel>


    <channel name="Flaps">


        <!-- Set flaps according to http://www.smartcockpit.com/docs/Embraer_190-Flight_Controls.pdf page 4-->
        <fcs_function name="Flaps Cmd">
            <function>
                <table>
                    <independentVar>/controls/flight/flaps</independentVar>
                    <tableData>
                        0.000   0
                        0.125   5
                        0.250  10
                        0.375  20
                        0.500  20
                        0.625  20
                        0.750  35
                    </tableData>
                </table>
            </function>
            <output>fcs/flap-cmd-int-deg</output>
        </fcs_function>

        <kinematic name="Flaps Control">
            <input>fcs/flap-cmd-int-deg</input>
            <noscale/>
            <traverse>
                <setting>
                    <position>0</position>
                    <time>0.0000</time>
                </setting>
                <setting>
                    <position>5</position>
                    <time>2.0000</time>
                </setting>
                <setting>
                    <position>10</position>
                    <time>2.0000</time>
                </setting>
                <setting>
                    <position>20</position>
                    <time>2.0000</time>
                </setting>
                <setting>
                    <position>35</position>
                    <time>3.0000</time>
                </setting>
            </traverse>
            <output>fcs/flap-pos-deg</output>
        </kinematic>

        <aerosurface_scale name="flap normalization">
            <input>fcs/flap-pos-deg</input>
            <domain>
                <min>  0 </min>
                <max> 35 </max>
            </domain>
            <range>
                <min> 0 </min>
                <max> 1 </max>
            </range>
            <output>fcs/flap-pos-norm</output>
        </aerosurface_scale>

    </channel>

    <channel name="Landing Gear">
        <switch>
            <default value="0" />
            <test logic="OR" value="0.066666667">
                /systems/hydraulic/system[0]/pressurized &gt; 0
                /systems/hydraulic/system[1]/pressurized &gt; 0
            </test>
            <output>gear/extend-retract-rate</output>
        </switch>
        <actuator name="Gear Control">
            <input>gear/gear-cmd-norm</input>
            <rate_limit>gear/extend-retract-rate</rate_limit>
            <output>gear/gear-pos-norm</output>
        </actuator>

    </channel>

    <channel name="Steering">
        <switch name="/controls/gear/tiller-disabled">
            <default value="0"/>
            <test logic="AND" value="1">
                /controls/gear/enable-tiller == 0
            </test>
        </switch>

        <fcs_function name="Nose Wheel Steering Limit 0">
          <function name="fcs/steer-nose-limit-deg[0]">
            <ifthen>
              <eq>
                <property>/sim/model/autopush/connected</property>
                <value>1</value>
              </eq>
              <value>76</value>
              <table>
                  <independentVar lookup="row">/velocities/groundspeed-kt</independentVar>
                  <tableData>
                      0.0 76
                     10.0 76
                     26.2 20
                     89.0 20
                    100.0  7
                  </tableData>
              </table>
            </ifthen>
          </function>
        </fcs_function>

        <fcs_function name="Nose Wheel Steering 0">
          <function name="fcs/steer-nose-deg[0]">
            <description>Steering command for nose gear</description>
            <ifthen>
              <eq>
                <property>/sim/model/autopush/connected</property>
                <value>1</value>
              </eq>
              <product>
                <property>/sim/model/autopush/autopush-cmd-norm</property>
                <value>70</value>
              </product>
              <ifthen>
                <property>gear/unit[0]/castered</property>
                <property>gear/unit[0]/steering-angle-deg</property>
                <ifthen>
                  <eq>
                    <property>/controls/gear/enable-tiller</property>
                    <value>1</value>
                  </eq>

                  <!-- Tiller enabled: rudder pedals command +/- 7°, tiller follows IRL schedule. -->
                  <ifthen>
                    <property>/options/controls/realistic-nose-wheel-steering</property>

                    <!-- Realistic NWS: tiller must be kept down for tiller
                         steering; rudder pedals only steer when tiller up. -->
                      <min>
                        <property>fcs/steer-nose-limit-deg[0]</property>
                        <max>
                          <property>-fcs/steer-nose-limit-deg[0]</property>
                          <ifthen>
                            <property>/controls/gear/tiller-pushed</property>
                            <!-- tiller down -->
                            <table>
                              <independentVar lookup="row">/controls/gear/tiller-cmd-norm</independentVar>
                              <tableData>
                                  -1.000 -76
                                  -0.625 -25
                                  -0.250  -5
                                  0.000   0
                                  0.250   5
                                  0.625  25
                                  1.000  76
                              </tableData>
                            </table>
                            <!-- tiller up -->
                            <product>
                              <property>/controls/flight/rudder</property>
                              <value>7</value>
                            </product>
                          </ifthen>
                        </max>
                    </min>

                      <!-- tiller up -->

                    <min>
                        <property>fcs/steer-nose-limit-deg[0]</property>
                        <max>
                            <property>-fcs/steer-nose-limit-deg[0]</property>
                            <sum>
                                <table>
                                  <independentVar lookup="row">/controls/gear/tiller-cmd-norm</independentVar>
                                  <tableData>
                                    -1.000 -76
                                    -0.625 -25
                                    -0.250  -5
                                     0.000   0
                                     0.250   5
                                     0.625  25
                                     1.000  76
                                  </tableData>
                                </table>
                                <product>
                                  <property>/controls/flight/rudder</property>
                                  <value>7</value>
                                </product>
                            </sum>
                        </max>
                    </min>
                  </ifthen>

                  <!-- Tiller disabled: rudder pedals command up to NWS limit. -->
                  <product>
                    <property>/controls/flight/rudder</property>
                    <property>fcs/steer-nose-limit-deg[0]</property>
                  </product>
                </ifthen>
              </ifthen>
            </ifthen>
          </function>
        </fcs_function>

        <fcs_function name="Gear Nose Rate">
            <function name="fcs/steer-nose-rate">
                <table>
                    <independentVar lookup="row">/systems/hydraulic/system[1]/pressure-psi</independentVar>
                    <tableData>
                        0 0
                        1200 0
                        1600 70
                        3000 70
                    </tableData>
                </table>
            </function>
        </fcs_function>

        <actuator name="Gear Nose Actuator">
            <input>fcs/steer-nose-deg[0]</input>
            <rate_limit>fcs/steer-nose-rate</rate_limit>
            <output>fcs/steer-pos-deg[0]</output>
        </actuator>
    </channel>

    <channel name="MFS Left Outboard">
        <switch name="MFS1 Powered">
            <default value="0" />
            <test logic="OR" value="fcs/mfs-left-outboard-cmd-norm">
                /systems/hydraulic/system[1]/pressurized &gt; 0
            </test>
            <output>fcs/mfs-left-outboard-powered</output>
        </switch>
        <kinematic name="MFS1 Control">
            <input>fcs/mfs-left-outboard-powered</input>
            <traverse>
                <setting>
                    <position> 0 </position>
                    <time>     0 </time>
                </setting>
                <setting>
                    <position> 1 </position>
                    <time>     1 </time>
                </setting>
            </traverse>
            <output>fcs/mfs1-pos-norm</output>
        </kinematic>
        <switch name="MFS2 Powered">
            <default value="0" />
            <test logic="OR" value="fcs/mfs-left-outboard-cmd-norm">
                /systems/hydraulic/system[0]/pressurized &gt; 0
            </test>
            <output>fcs/mfs-left-outboard-powered</output>
        </switch>
        <kinematic name="MFS2 Control">
            <input>fcs/mfs-left-outboard-powered</input>
            <traverse>
                <setting>
                    <position> 0 </position>
                    <time>     0 </time>
                </setting>
                <setting>
                    <position> 1 </position>
                    <time>     1 </time>
                </setting>
            </traverse>
            <output>fcs/mfs2-pos-norm</output>
        </kinematic>
        <switch name="MFS3 Powered">
            <default value="0" />
            <test logic="OR" value="fcs/mfs-left-outboard-cmd-norm">
                /systems/hydraulic/system[0]/pressurized &gt; 0
            </test>
            <output>fcs/mfs-left-outboard-powered</output>
        </switch>
        <kinematic name="MFS3 Control">
            <input>fcs/mfs-left-outboard-powered</input>
            <traverse>
                <setting>
                    <position> 0 </position>
                    <time>     0 </time>
                </setting>
                <setting>
                    <position> 1 </position>
                    <time>     1 </time>
                </setting>
            </traverse>
            <output>fcs/mfs3-pos-norm</output>
        </kinematic>
    </channel>
    <channel name="MFS Left Inboard">
        <switch name="MFS4 Powered">
            <default value="0" />
            <test logic="OR" value="fcs/mfs-left-inboard-cmd-norm">
                /systems/hydraulic/system[0]/pressurized &gt; 0
            </test>
            <output>fcs/mfs-left-inboard-powered</output>
        </switch>
        <kinematic name="MFS4 Control">
            <input>fcs/mfs-left-inboard-powered</input>
            <traverse>
                <setting>
                    <position> 0 </position>
                    <time>     0 </time>
                </setting>
                <setting>
                    <position> 1 </position>
                    <time>     1 </time>
                </setting>
            </traverse>
            <output>fcs/mfs4-pos-norm</output>
        </kinematic>
        <switch name="MFS5 Powered">
            <default value="0" />
            <test logic="OR" value="fcs/mfs-left-inboard-cmd-norm">
                /systems/hydraulic/system[1]/pressurized &gt; 0
            </test>
            <output>fcs/mfs-left-inboard-powered</output>
        </switch>
        <kinematic name="MFS5 Control">
            <input>fcs/mfs-left-inboard-powered</input>
            <traverse>
                <setting>
                    <position> 0 </position>
                    <time>     0 </time>
                </setting>
                <setting>
                    <position> 1 </position>
                    <time>     1 </time>
                </setting>
            </traverse>
            <output>fcs/mfs5-pos-norm</output>
        </kinematic>
    </channel>
    <channel name="MFS Right Outboard">
        <switch name="MFS10 Powered">
            <default value="0" />
            <test logic="OR" value="fcs/mfs-right-outboard-cmd-norm">
                /systems/hydraulic/system[1]/pressurized &gt; 0
            </test>
            <output>fcs/mfs-right-outboard-powered</output>
        </switch>
        <kinematic name="MFS10 Control">
            <input>fcs/mfs-right-outboard-powered</input>
            <traverse>
                <setting>
                    <position> 0 </position>
                    <time>     0 </time>
                </setting>
                <setting>
                    <position> 1 </position>
                    <time>     1 </time>
                </setting>
            </traverse>
            <output>fcs/mfs10-pos-norm</output>
        </kinematic>
        <switch name="MFS9 Powered">
            <default value="0" />
            <test logic="OR" value="fcs/mfs-right-outboard-cmd-norm">
                /systems/hydraulic/system[0]/pressurized &gt; 0
            </test>
            <output>fcs/mfs-right-outboard-powered</output>
        </switch>
        <kinematic name="MFS9 Control">
            <input>fcs/mfs-right-outboard-powered</input>
            <traverse>
                <setting>
                    <position> 0 </position>
                    <time>     0 </time>
                </setting>
                <setting>
                    <position> 1 </position>
                    <time>     1 </time>
                </setting>
            </traverse>
            <output>fcs/mfs9-pos-norm</output>
        </kinematic>
        <switch name="MFS8 Powered">
            <default value="0" />
            <test logic="OR" value="fcs/mfs-right-outboard-cmd-norm">
                /systems/hydraulic/system[0]/pressurized &gt; 0
            </test>
            <output>fcs/mfs-right-outboard-powered</output>
        </switch>
        <kinematic name="MFS8 Control">
            <input>fcs/mfs-right-outboard-powered</input>
            <traverse>
                <setting>
                    <position> 0 </position>
                    <time>     0 </time>
                </setting>
                <setting>
                    <position> 1 </position>
                    <time>     1 </time>
                </setting>
            </traverse>
            <output>fcs/mfs8-pos-norm</output>
        </kinematic>
    </channel>
    <channel name="MFS Right Inboard">
        <switch name="MFS7 Powered">
            <default value="0" />
            <test logic="OR" value="fcs/mfs-right-inboard-cmd-norm">
                /systems/hydraulic/system[0]/pressurized &gt; 0
            </test>
            <output>fcs/mfs-right-inboard-powered</output>
        </switch>
        <kinematic name="MFS7 Control">
            <input>fcs/mfs-right-inboard-powered</input>
            <traverse>
                <setting>
                    <position> 0 </position>
                    <time>     0 </time>
                </setting>
                <setting>
                    <position> 1 </position>
                    <time>     1 </time>
                </setting>
            </traverse>
            <output>fcs/mfs7-pos-norm</output>
        </kinematic>
        <switch name="MFS6 Powered">
            <default value="0" />
            <test logic="OR" value="fcs/mfs-right-inboard-cmd-norm">
                /systems/hydraulic/system[1]/pressurized &gt; 0
            </test>
            <output>fcs/mfs-right-inboard-powered</output>
        </switch>
        <kinematic name="MFS6 Control">
            <input>fcs/mfs-right-inboard-powered</input>
            <traverse>
                <setting>
                    <position> 0 </position>
                    <time>     0 </time>
                </setting>
                <setting>
                    <position> 1 </position>
                    <time>     1 </time>
                </setting>
            </traverse>
            <output>fcs/mfs6-pos-norm</output>
        </kinematic>
    </channel>

    <channel name="FADEC">
        <pure_gain name="fcs/throttle-pos-norm[0]">
            <input>/fadec/throttle-cmd[0]</input>
            <gain>1.0</gain>
        </pure_gain>

        <pure_gain name="fcs/throttle-pos-norm[1]">
            <input>/fadec/throttle-cmd[1]</input>
            <gain>1.0</gain>
        </pure_gain>
    </channel>

	<channel name="Brakes">
		<summer name="fcs/brake-power-outboard-psi">
            <input>/systems/hydraulic/system[0]/pressure-psi</input>
        </summer>

		<pure_gain name="fcs/brake-power-outboard-norm">
            <gain>0.0001666667</gain>
            <input>fcs/brake-power-outboard-psi</input>
        </pure_gain>

		<summer name="fcs/brake-power-inboard-psi">
            <input>/systems/hydraulic/system[1]/pressure-psi</input>
        </summer>

		<pure_gain name="fcs/brake-power-inboard-norm">
            <gain>0.0001666667</gain>
            <input>fcs/brake-power-inboard-psi</input>
        </pure_gain>

		<summer name="fcs/emer-brake-power">
            <input>/systems/hydraulic/system[0]/emergency-accumulator</input>
            <input>/systems/hydraulic/system[1]/emergency-accumulator</input>
        </summer>

		<pure_gain name="fcs/emer-brake-power-norm">
            <gain>4</gain>
            <input>fcs/emer-brake-power</input>
			<clipto>
				<min>0</min>
				<max>1</max>
			</clipto>
        </pure_gain>

		<actuator name="fcs/brake-left">
			<input>/controls/gear/brake-left</input>
			<rate_limit>2</rate_limit>
		</actuator>

		<actuator name="fcs/brake-right">
			<input>/controls/gear/brake-right</input>
			<rate_limit>2</rate_limit>
		</actuator>

		<fcs_function name="fcs/left-inboard-brake-input-norm">
			<function>
				<product>
					<property>fcs/brake-power-inboard-norm</property>
					<max>
						<property>fcs/brake-left</property>
						<product>
							<property>/autopilot/autobrake/output-brake</property>
							<property>/autopilot/autobrake/engaged</property>
						</product>
						<property>/controls/gear/brake-parking</property>
					</max>
				</product>
			</function>
		</fcs_function>
		<fcs_function name="fcs/left-outboard-brake-input-norm">
			<function>
				<product>
					<property>fcs/brake-power-outboard-norm</property>
					<max>
						<property>fcs/brake-left</property>
						<product>
							<property>/autopilot/autobrake/output-brake</property>
							<property>/autopilot/autobrake/engaged</property>
						</product>
						<property>/controls/gear/brake-parking</property>
					</max>
				</product>
			</function>
		</fcs_function>
		<fcs_function name="fcs/left-brake-input-emer">
			<function>
				<product>
					<property>fcs/emer-brake-power-norm</property>
                    <property>/controls/gear/brake-parking</property>
				</product>
			</function>
		</fcs_function>

        <summer name="fcs/left-inboard-brake-input">
            <input>fcs/left-inboard-brake-input-norm</input>
            <input>fcs/left-brake-input-emer</input>
        </summer>

		<actuator>
			<input>fcs/left-inboard-brake-input</input>
			<rate_limit>10</rate_limit>
            <output>fcs/left-inboard-brake</output>
		</actuator>

        <summer name="fcs/left-outboard-brake-input">
            <input>fcs/left-outboard-brake-input-norm</input>
            <input>fcs/left-brake-input-emer</input>
        </summer>

		<actuator>
			<input>fcs/left-outboard-brake-input</input>
			<rate_limit>10</rate_limit>
            <output>fcs/left-outboard-brake</output>
		</actuator>

        <summer name="fcs/left-brake-cmd-norm">
            <input>fcs/left-inboard-brake</input>
            <input>fcs/left-outboard-brake</input>
            <input>/services/chocks</input>
			<clipto>
				<min>0</min>
				<max>1</max>
			</clipto>
        </summer>

		<fcs_function name="fcs/right-inboard-brake-input-norm">
			<function>
				<product>
					<property>fcs/brake-power-inboard-norm</property>
					<max>
						<property>fcs/brake-right</property>
						<product>
							<property>/autopilot/autobrake/output-brake</property>
							<property>/autopilot/autobrake/engaged</property>
						</product>
						<property>/controls/gear/brake-parking</property>
					</max>
				</product>
			</function>
		</fcs_function>
		<fcs_function name="fcs/right-outboard-brake-input-norm">
			<function>
				<product>
					<property>fcs/brake-power-outboard-norm</property>
					<max>
						<property>fcs/brake-right</property>
						<product>
							<property>/autopilot/autobrake/output-brake</property>
							<property>/autopilot/autobrake/engaged</property>
						</product>
						<property>/controls/gear/brake-parking</property>
					</max>
				</product>
			</function>
		</fcs_function>
		<fcs_function name="fcs/right-brake-input-emer">
			<function>
				<product>
					<property>fcs/emer-brake-power-norm</property>
                    <property>/controls/gear/brake-parking</property>
				</product>
			</function>
		</fcs_function>

        <summer name="fcs/right-inboard-brake-input">
            <input>fcs/right-inboard-brake-input-norm</input>
            <input>fcs/right-brake-input-emer</input>
        </summer>

		<actuator>
			<input>fcs/right-inboard-brake-input</input>
			<rate_limit>10</rate_limit>
            <output>fcs/right-inboard-brake</output>
		</actuator>

        <summer name="fcs/right-outboard-brake-input">
            <input>fcs/right-outboard-brake-input-norm</input>
            <input>fcs/right-brake-input-emer</input>
        </summer>

		<actuator>
			<input>fcs/right-outboard-brake-input</input>
			<rate_limit>10</rate_limit>
            <output>fcs/right-outboard-brake</output>
		</actuator>

        <summer name="fcs/right-brake-cmd-norm">
            <input>fcs/right-inboard-brake</input>
            <input>fcs/right-outboard-brake</input>
            <input>/services/chocks</input>
			<clipto>
				<min>0</min>
				<max>1</max>
			</clipto>
        </summer>

	</channel>
</flight_control>
